*HEADING
2D plate with hole - plate_000
*NODE
1, 121.150314, 66.761397, 0.0
2, 0.000000, 0.000000, 0.0
3, 153.245106, 0.000000, 0.0
4, 0.000000, 94.471144, 0.0
5, 153.245106, 94.471144, 0.0
6, 120.781953, 69.205311, 0.0
7, 119.709601, 71.432073, 0.0
8, 118.028541, 73.243825, 0.0
9, 115.888143, 74.479585, 0.0
10, 113.478589, 75.029550, 0.0
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*ELEMENT, TYPE=CPS3, ELSET=EALL
1, 244, 318, 91
2, 327, 360, 298
3, 311, 327, 298
4, 334, 339, 227
5, 235, 240, 201
6, 139, 263, 220
7, 242, 252, 112
8, 303, 304, 191
9, 120, 238, 119
10, 248, 249, 106
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*NSET, NSET=LEFT
2, 55, 54, 53, 52, 51, 50, 49, 48, 47, 46, 45
4
*NSET, NSET=RIGHT
3, 56, 57, 58, 59, 60, 61, 62, 63, 64, 65, 66
5
*NSET, NSET=NALL
1, 2, 3, 4, 5, 6, 7, 8, 9, 10, 11, 12
13, 14, 15, 16, 17, 18, 19, 20, 21, 22, 23, 24
25, 26, 27, 28, 29, 30, 31, 32, 33, 34, 35, 36
37, 38, 39, 40, 41, 42, 43, 44, 45, 46, 47, 48
49, 50, 51, 52, 53, 54, 55, 56, 57, 58, 59, 60
61, 62, 63, 64, 65, 66, 67, 68, 69, 70, 71, 72
73, 74, 75, 76, 77, 78, 79, 80, 81, 82, 83, 84
85, 86, 87, 88, 89, 90, 91, 92, 93, 94, 95, 96
97, 98, 99, 100, 101, 102, 103, 104, 105, 106, 107, 108
109, 110, 111, 112, 113, 114, 115, 116, 117, 118, 119, 120
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*MATERIAL, NAME=STEEL
*ELASTIC
210000.000, 0.300000
*SOLID SECTION, ELSET=EALL, MATERIAL=STEEL
7.540847
*STEP
*STATIC
*BOUNDARY
LEFT, 1, 1, 0.0
LEFT, 2, 2, 0.0
*CLOAD
3, 1, 24.269545
56, 1, 48.539089
57, 1, 48.539089
58, 1, 48.539089
59, 1, 48.539089
60, 1, 48.539089
61, 1, 48.539089
62, 1, 48.539089
63, 1, 48.539089
64, 1, 48.539089
65, 1, 48.539089
66, 1, 48.539089
5, 1, 24.269545
*NODE FILE
U
*EL FILE
S
*NODE PRINT, NSET=NALL
U
*EL PRINT, ELSET=EALL
S
*END STEP
