*HEADING
2D plate with hole - plate_001
*NODE
1, 102.274308, 53.739121, 0.0
2, 0.000000, 0.000000, 0.0
3, 164.643790, 0.000000, 0.0
4, 0.000000, 86.923862, 0.0
5, 164.643790, 86.923862, 0.0
6, 102.067506, 56.168867, 0.0
7, 101.453050, 58.528714, 0.0
8, 100.448616, 60.750772, 0.0
9, 99.083100, 62.771118, 0.0
10, 97.395786, 64.531630, 0.0
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*ELEMENT, TYPE=CPS3, ELSET=EALL
1, 181, 319, 216
2, 305, 307, 119
3, 215, 299, 120
4, 240, 324, 132
5, 299, 321, 289
6, 124, 343, 288
7, 267, 280, 266
8, 136, 345, 277
9, 145, 316, 214
10, 147, 214, 179
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*NSET, NSET=LEFT
2, 71, 70, 69, 68, 67, 66, 65, 64, 63, 62, 4
*NSET, NSET=RIGHT
3, 72, 73, 74, 75, 76, 77, 78, 79, 80, 81, 5
*NSET, NSET=NALL
1, 2, 3, 4, 5, 6, 7, 8, 9, 10, 11, 12
13, 14, 15, 16, 17, 18, 19, 20, 21, 22, 23, 24
25, 26, 27, 28, 29, 30, 31, 32, 33, 34, 35, 36
37, 38, 39, 40, 41, 42, 43, 44, 45, 46, 47, 48
49, 50, 51, 52, 53, 54, 55, 56, 57, 58, 59, 60
61, 62, 63, 64, 65, 66, 67, 68, 69, 70, 71, 72
73, 74, 75, 76, 77, 78, 79, 80, 81, 82, 83, 84
85, 86, 87, 88, 89, 90, 91, 92, 93, 94, 95, 96
97, 98, 99, 100, 101, 102, 103, 104, 105, 106, 107, 108
109, 110, 111, 112, 113, 114, 115, 116, 117, 118, 119, 120
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*MATERIAL, NAME=STEEL
*ELASTIC
210000.000, 0.300000
*SOLID SECTION, ELSET=EALL, MATERIAL=STEEL
6.334280
*STEP
*STATIC
*BOUNDARY
LEFT, 1, 1, 0.0
LEFT, 2, 2, 0.0
*CLOAD
3, 1, 60.517829
72, 1, 121.035658
73, 1, 121.035658
74, 1, 121.035658
75, 1, 121.035658
76, 1, 121.035658
77, 1, 121.035658
78, 1, 121.035658
79, 1, 121.035658
80, 1, 121.035658
81, 1, 121.035658
5, 1, 60.517829
*NODE FILE
U
*EL FILE
S
*NODE PRINT, NSET=NALL
U
*EL PRINT, ELSET=EALL
S
*END STEP
