*HEADING
2D plate with hole - plate_002
*NODE
1, 117.822125, 28.080275, 0.0
2, 0.000000, 0.000000, 0.0
3, 137.214991, 0.000000, 0.0
4, 0.000000, 65.522885, 0.0
5, 137.214991, 65.522885, 0.0
6, 117.504903, 30.489813, 0.0
7, 116.574856, 32.735146, 0.0
8, 115.095364, 34.663256, 0.0
9, 113.167254, 36.142748, 0.0
10, 110.921921, 37.072795, 0.0
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*ELEMENT, TYPE=CPS3, ELSET=EALL
1, 186, 196, 140
2, 95, 260, 188
3, 41, 218, 40
4, 186, 247, 84
5, 84, 254, 186
6, 40, 218, 98
7, 114, 116, 113
8, 227, 228, 112
9, 182, 230, 159
10, 183, 252, 225
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*NSET, NSET=LEFT
2, 53, 52, 51, 50, 49, 48, 47, 46, 4
*NSET, NSET=RIGHT
3, 54, 55, 56, 57, 58, 59, 60, 61, 5
*NSET, NSET=NALL
1, 2, 3, 4, 5, 6, 7, 8, 9, 10, 11, 12
13, 14, 15, 16, 17, 18, 19, 20, 21, 22, 23, 24
25, 26, 27, 28, 29, 30, 31, 32, 33, 34, 35, 36
37, 38, 39, 40, 41, 42, 43, 44, 45, 46, 47, 48
49, 50, 51, 52, 53, 54, 55, 56, 57, 58, 59, 60
61, 62, 63, 64, 65, 66, 67, 68, 69, 70, 71, 72
73, 74, 75, 76, 77, 78, 79, 80, 81, 82, 83, 84
85, 86, 87, 88, 89, 90, 91, 92, 93, 94, 95, 96
97, 98, 99, 100, 101, 102, 103, 104, 105, 106, 107, 108
109, 110, 111, 112, 113, 114, 115, 116, 117, 118, 119, 120
121, 122, 123, 124, 125, 126, 127, 128, 129, 130, 131, 132
133, 134, 135, 136, 137, 138, 139, 140, 141, 142, 143, 144
145, 146, 147, 148, 149, 150, 151, 152, 153, 154, 155, 156
157, 158, 159, 160, 161, 162, 163, 164, 165, 166, 167, 168
169, 170, 171, 172, 173, 174, 175, 176, 177, 178, 179, 180
181, 182, 183, 184, 185, 186, 187, 188, 189, 190, 191, 192
193, 194, 195, 196, 197, 198, 199, 200, 201, 202, 203, 204
205, 206, 207, 208, 209, 210, 211, 212, 213, 214, 215, 216
217, 218, 219, 220, 221, 222, 223, 224, 225, 226, 227, 228
229, 230, 231, 232, 233, 234, 235, 236, 237, 238, 239, 240
241, 242, 243, 244, 245, 246, 247, 248, 249, 250, 251, 252
253, 254, 255, 256, 257, 258, 259, 260, 261, 262, 263, 264
265, 266, 267, 268, 269, 270, 271, 272, 273, 274, 275, 276
277, 278, 279, 280, 281, 282, 283, 284, 285, 286, 287, 288
289, 290, 291, 292, 293, 294, 295, 296
*MATERIAL, NAME=STEEL
*ELASTIC
210000.000, 0.300000
*SOLID SECTION, ELSET=EALL, MATERIAL=STEEL
5.303721
*STEP
*STATIC
*BOUNDARY
LEFT, 1, 1, 0.0
LEFT, 2, 2, 0.0
*CLOAD
3, 1, 65.372809
54, 1, 130.745618
55, 1, 130.745618
56, 1, 130.745618
57, 1, 130.745618
58, 1, 130.745618
59, 1, 130.745618
60, 1, 130.745618
61, 1, 130.745618
5, 1, 65.372809
*NODE FILE
U
*EL FILE
S
*NODE PRINT, NSET=NALL
U
*EL PRINT, ELSET=EALL
S
*END STEP
